<?xml version="1.0" ?>
<!-- NEW DEFAULT SOFA SCENE (Thanks to Jeremy Ringard for the caduceus model) -->
<Node name="root" gravity="0 -1000 0" dt="0.04">
    <RequiredPlugin name="SofaOpenglVisual"/>
    <RequiredPlugin pluginName="CImgPlugin"/>
    <VisualStyle displayFlags="showVisual  " /> <!--showBehaviorModels showCollisionModels-->
    <LCPConstraintSolver tolerance="1e-3" maxIt="1000" initial_guess="false" build_lcp="false"  printLog="0" mu="0.2"/>
    <FreeMotionAnimationLoop />
    <DefaultPipeline depth="15" verbose="0" draw="0" />
    <BruteForceDetection name="N2" />
    <MinProximityIntersection name="Proximity" alarmDistance="1.5" contactDistance="1" />

    <DefaultContactManager name="Response" response="FrictionContact" />

    <InteractiveCamera position="0 30 90" lookAt="0 30 0"/>
    <LightManager />
    <SpotLight name="light1" color="1 1 1" position="0 80 25" direction="0 -1 -0.8" cutoff="30" exponent="1" />
    <SpotLight name="light2" color="1 1 1" position="0 40 100" direction="0 0 -1" cutoff="30" exponent="1" />

    <MeshObjLoader name="visual_snake_body" filename="mesh/snake_body.obj" handleSeams="1" />
    <MeshObjLoader name="visual_snake_cornea" filename="mesh/snake_cornea.obj" handleSeams="1" />
    <MeshObjLoader name="visual_snake_eye" filename="mesh/snake_yellowEye.obj" handleSeams="1" />
    <MeshObjLoader name="SOFA_pod" filename="mesh/SOFA_pod.obj" handleSeams="1" />

    <Node name="Snake" >

        <SparseGridRamificationTopology name="grid" n="4 12 3" fileTopology="mesh/snake_body.obj" nbVirtualFinerLevels="3" finestConnectivity="0"/>

        <EulerImplicitSolver name="cg_odesolver" rayleighMass="1" rayleighStiffness="0.03" />
        <CGLinearSolver name="linear_solver" iterations="20" tolerance="1e-12" threshold="1e-18" />
        <MechanicalObject name="dofs"  scale="1" dy="2" position="@grid.position"  tags="NoPicking" />
        <UniformMass totalMass="1.0" />
        <HexahedronFEMForceField name="FEM" youngModulus="30000.0" poissonRatio="0.3" method="large" updateStiffnessMatrix="false" printLog="0" />
        <UncoupledConstraintCorrection useOdeSolverIntegrationFactors="0"/>

        <Node name="Collis">
            <MeshObjLoader name="loader" filename="mesh/meca_snake_900tri.obj" />
            <MeshTopology src="@loader" />
            <MechanicalObject src="@loader" name="CollisModel" />
            <TriangleCollisionModel  selfCollision="0" />
            <LineCollisionModel    selfCollision="0" />
            <PointCollisionModel  selfCollision="0" />
            <BarycentricMapping input="@.." output="@." />
        </Node>

        <Node name="VisuBody" tags="Visual" >
            <OglModel  name="VisualBody" src="@../../visual_snake_body" texturename="textures/snakeColorMap.png"  />
            <BarycentricMapping input="@.." output="@VisualBody" />
        </Node>

        <Node name="VisuCornea" tags="Visual" >
            <OglModel  name="VisualCornea" src="@../../visual_snake_cornea"   />
            <BarycentricMapping input="@.." output="@VisualCornea" />
        </Node>

        <Node name="VisuEye" tags="Visual" >
            <OglModel  name="VisualEye" src="@../../visual_snake_eye"   />
            <BarycentricMapping input="@.." output="@VisualEye" />
        </Node>

    </Node>

    <Node name="floor">

        <RegularGridTopology nx="2" ny="2" nz="2" xmin="-20" xmax="20" ymin="-0.5" ymax="0" zmin="-20" zmax="20" />
        <MechanicalObject scale3d="1 1 1" translation="0 0 0" rotation="0 0 0" />
        <OglModel texturename="textures/floor2.bmp" />

        <TriangleCollisionModel />
        <LineCollisionModel />
        <PointCollisionModel />

    </Node>

</Node>
